// SBML level 3 version 2

model Dandekar_Patterns2020()
  // SIR-type universal differential equation model for COVID-19 spread, based on Dandekar, Rackauckas, and Barbastathis, Patterns, 2020. The parameter quarantine_rate is intended to be assigned dynamically from the PEtab-SciML neural-network output net1_output1.
  // isDescribedBy doi:10.1016/j.patter.2020.100145 pubmed:33225319
  // model units - substance: person, time: day, extent: person

  // Compartments:
  compartment population = 1;  // 0-D

  // Species:
  substanceOnly species S in population = 66000000; S is "susceptible";
  substanceOnly species I in population = 762; I is "infected";
  substanceOnly species R in population = 26; R is "recovered";
  substanceOnly species T in population = 10; T is "quarantined";

  // Parameters:
  N = 66000000 person; N is "population_size";
  beta has per_day; beta is "infection_rate";
  gamma has per_day; gamma is "recovery_rate";
  delta has per_day; delta is "quarantine_release_rate";
  quarantine_rate has per_day; quarantine_rate is "neural_network_quarantine_rate";

  // Rate rules:
  S' = -(beta*S*I/N);
  I' = beta*S*I/N - gamma*I - quarantine_rate*I;
  R' = gamma*I + delta*T;
  T' = quarantine_rate*I - delta*T;

  // Unit definitions:
  unit person = item;
  unit day = 86400 second;
  unit per_day = 1 / (1.157407e-5 second);
end
