// SBML level 3 version 2

model Ko_NeurIPS2023()
  // Second-order neural ODE model of double-pendulum dynamics, based on Ko et al., NeurIPS 2023. The angular accelerations are supplied by the neural-network outputs through the PEtab-SciML hybridization table.
  // model units - time: second

  // Parameters:
  theta1 = -1.133615 dimensionless;
  theta2 = -1.300805 dimensionless;
  omega1 = -0.5385388 dimensionless;
  omega2 = -6.155058 dimensionless;
  acceleration1 has per_second2; acceleration1 is "neural_network_angular_acceleration_1";
  acceleration2 has per_second2; acceleration2 is "neural_network_angular_acceleration_2";

  // Rate rules:
  theta1' = omega1;
  theta2' = omega2;
  omega1' = acceleration1;
  omega2' = acceleration2;

  // Unit definitions:
  unit per_second2 = 1 / second^2; per_second2 is "per second squared";
end
